# Лабораторная работа №2  Светлаковой Ульяны 1-ПМИ
# Вариант №54
(1)
n := 0 .. 5
m := 0 .. 5
M[n, m] := 2*n + m
M[n, n] := 3*n + 0.1
V[n] := n^3
M = [
    0.1, 1, 2, 3, 4, 5;
    2, 3.1, 4, 5, 6, 7;
    4, 5, 6.1, 7, 8, 9;
    6, 7, 8, 9.1, 10, 11;
    8, 9, 10, 11, 12.1, 13;
    10, 11, 12, 13, 14, 15.1
]
V = [0; 1; 8; 27; 64; 125]
(2)
det(M) = -0.020549
det(M^2) = 0.000422261
condi(M) = 1230.86  # <- число обусловленности, основанное на равномерной норме
# (3) | 1 способ: | 2 способ:
f(x) := 7*x - 3
q(x) := 9*x - 4
g(x) := 14*x - 6
t(x) := 18*x - 8
[f(x); g(x)] solve → 3/7
A := [9; 18]
B := [4; 8]
lsolve(A, B) = [0.444444]
(4)
geninv(M) = [
    4.64694, -3.88827, -2.42348, -0.958684, 0.506107, 1.9709;
    -3.8834, 6.99742, -2.12176, -1.24094, -0.360115, 0.520707;
    -2.41374, -2.11689, 8.17996, -1.52319, -1.22634, -0.929486;
    -0.944085, -1.2312, -1.51832, 8.19456, -2.09256, -2.37968;
    0.525573, -0.345516, -1.2166, -2.08769, 7.04122, -3.82987;
    1.99523, 0.540172, -0.914886, -2.36995, -3.825, 4.71994
]
# или можно записать как M^-1
# Погрешность :
(M*M^-1) - identity(6) = [
    -1.77636e-15, -8.88178e-16, 8.88178e-16, 0, 1.42109e-14, -1.06581e-14;
    1.77636e-15, -3.55271e-15, 8.88178e-16, 3.55271e-15, 2.13163e-14, -2.13163e-14;
    0, -4.44089e-15, -1.77636e-15, 3.55271e-15, 3.55271e-14, -2.84217e-14;
    -1.42109e-14, 2.66454e-15, -1.77636e-15, 7.10543e-15, 6.39488e-14, -4.9738e-14;
    -3.55271e-15, -3.55271e-15, -5.32907e-15, 3.55271e-15, 6.39488e-14, -5.68434e-14;
    3.55271e-15, -1.06581e-14, -5.32907e-15, 2.84217e-14, 7.10543e-14, -5.68434e-14
]
# (5) | Погрешность решения системы линейных уравнений:
# Погрешность способа №1: | Погрешность способа №2:
f(3/7) = 0
q(0.444) = -0.004
(6)
t := 0 .. 7
p := 0 .. 7
w[t] := t^4
N[t, p] := 0.4*t + 6*p
N[t, t] := 5*t + 3
N = [
    3, 6, 12, 18, 24, 30, 36, 42;
    0.4, 8, 12.4, 18.4, 24.4, 30.4, 36.4, 42.4;
    0.8, 6.8, 13, 18.8, 24.8, 30.8, 36.8, 42.8;
    1.2, 7.2, 13.2, 18, 25.2, 31.2, 37.2, 43.2;
    1.6, 7.6, 13.6, 19.6, 23, 31.6, 37.6, 43.6;
    2, 8, 14, 20, 26, 28, 38, 44;
    2.4, 8.4, 14.4, 20.4, 26.4, 32.4, 33, 44.4;
    2.8, 8.8, 14.8, 20.8, 26.8, 32.8, 38.8, 38
]
w = [0; 1; 16; 81; 256; 625; 1296; 2401]
det(N) = -77962.7  # - матрица не вырождена
# Формируем расширенную матрицу системы:
Ar := augment(N, w)
Ar = [
    3, 6, 12, 18, 24, 30, 36, 42, 0;
    0.4, 8, 12.4, 18.4, 24.4, 30.4, 36.4, 42.4, 1;
    0.8, 6.8, 13, 18.8, 24.8, 30.8, 36.8, 42.8, 16;
    1.2, 7.2, 13.2, 18, 25.2, 31.2, 37.2, 43.2, 81;
    1.6, 7.6, 13.6, 19.6, 23, 31.6, 37.6, 43.6, 256;
    2, 8, 14, 20, 26, 28, 38, 44, 625;
    2.4, 8.4, 14.4, 20.4, 26.4, 32.4, 33, 44.4, 1296;
    2.8, 8.8, 14.8, 20.8, 26.8, 32.8, 38.8, 38, 2401
]
# Приводим матрицу к ступенчатому виду:
Ag := rref(Ar)
Ag = [
    1, 0, 0, 0, 0, 0, 0, 0, 181.429;
    0, 1, 0, 0, 0, 0, 0, 0, 184.056;
    0, 0, 1, 0, 0, 0, 0, 0, 293.461;
    0, 0, 0, 1, 0, 0, 0, 0, 105.92;
    0, 0, 0, 0, 1, 0, 0, 0, 78.039;
    0, 0, 0, 0, 0, 1, 0, 0, 21.1746;
    0, 0, 0, 0, 0, 0, 1, 0, -62.1305;
    0, 0, 0, 0, 0, 0, 0, 1, -174.957
]
# Выделяем последний столбец матрицы с решением системы:
x := submatrix(Ag, 0, 7, 8, 8)
# Погрешность:
x = [181.429; 184.056; 293.461; 105.92; 78.039; 21.1746; -62.1305; -174.957]
(N*x) - w = [-5.45697e-12; -6.36646e-12; -6.36646e-12; -5.45697e-12; -8.18545e-12; -8.18545e-12; -8.18545e-12; -6.36646e-12]
(7)
B := lu(N)
B = [
    0, 0, 0, 0, 0, 0, 0, 1, 1, 0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;
    0, 1, 0, 0, 0, 0, 0, 0, 0.142857, 1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;
    0, 0, 1, 0, 0, 0, 0, 0, 0.285714, 0.635593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;
    1, 0, 0, 0, 0, 0, 0, 0, 1.07143, -0.508475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;
    0, 0, 0, 0, 1, 0, 0, 0, 0.571429, 0.381356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;
    0, 0, 0, 0, 0, 1, 0, 0, 0.714286, 0.254237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;
    0, 0, 0, 0, 0, 0, 1, 0, 0.857143, 0.127119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;
    0, 0, 0, 1, 0, 0, 0, 0, 0.428571, 0.508475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]
P := submatrix(B, 0, rows(B) - 1, 0, cols(B)/3 - 1)
P = [
    0, 0, 0, 0, 0, 0, 0, 1;
    0, 1, 0, 0, 0, 0, 0, 0;
    0, 0, 1, 0, 0, 0, 0, 0;
    1, 0, 0, 0, 0, 0, 0, 0;
    0, 0, 0, 0, 1, 0, 0, 0;
    0, 0, 0, 0, 0, 1, 0, 0;
    0, 0, 0, 0, 0, 0, 1, 0;
    0, 0, 0, 1, 0, 0, 0, 0
]
L := submatrix(B, 0, rows(B) - 1, cols(B)/4 + 2, (cols(B)/2) + 3)
L = [
    1, 0, 0, 0, 0, 0, 0, 0;
    0.142857, 1, 0, 0, 0, 0, 0, 0;
    0.285714, 0.635593, 1, 0, 0, 0, 0, 0;
    1.07143, -0.508475, 0.614568, 1, 0, 0, 0, 0;
    0.571429, 0.381356, 0.546282, 0.0972973, 1, 0, 0, 0;
    0.714286, 0.254237, 0.364188, 0.0648649, 0.0240481, 1, 0, 0;
    0.857143, 0.127119, 0.182094, 0.0324324, 0.012024, 0.0151574, 1, 0;
    0.428571, 0.508475, 0.728376, -0.582703, -0.809218, -0.729188, -0.687519, 1
]
U := submatrix(B, 0, rows(B) - 1, cols(B)/2 + 4, cols(B) - 1)
U = [
    2.8, 8.8, 14.8, 20.8, 26.8, 32.8, 38.8, 38;
    0, 6.74286, 10.2857, 15.4286, 20.5714, 25.7143, 30.8571, 36.9714;
    0, 0, 2.2339, 3.05085, 4.0678, 5.08475, 6.10169, 8.44407;
    0, 0, 0, 1.68437, 3.24583, 4.80728, 6.36874, 14.8953;
    0, 0, 0, 0, -2.6973, -0.194595, -0.291892, 1.72432;
    0, 0, 0, 0, 0, -4.12505, -0.187575, 3.37475;
    0, 0, 0, 0, 0, 0, -5.49094, 5.03622;
    0, 0, 0, 0, 0, 0, 0, 17.963
]
(8)
N^94 = [
    8.95698e209, 3.6386e210, 6.33873e210, 8.99706e210, 1.16146e211, 1.41922e211, 1.67308e211, 1.92314e211;
    9.05337e209, 3.67776e210, 6.40694e210, 9.09388e210, 1.17396e211, 1.43449e211, 1.69109e211, 1.94383e211;
    9.14826e209, 3.7163e210, 6.47409e210, 9.18919e210, 1.18626e211, 1.44953e211, 1.70881e211, 1.9642e211;
    9.24167e209, 3.75425e210, 6.5402e210, 9.28303e210, 1.19837e211, 1.46433e211, 1.72626e211, 1.98426e211;
    9.33366e209, 3.79162e210, 6.60529e210, 9.37543e210, 1.2103e211, 1.4789e211, 1.74344e211, 2.00401e211;
    9.42424e209, 3.82842e210, 6.6694e210, 9.46641e210, 1.22205e211, 1.49326e211, 1.76036e211, 2.02346e211;
    9.51345e209, 3.86466e210, 6.73253e210, 9.55602e210, 1.23362e211, 1.50739e211, 1.77703e211, 2.04261e211;
    9.60132e209, 3.90035e210, 6.79472e210, 9.64429e210, 1.24501e211, 1.52131e211, 1.79344e211, 2.06148e211
]
