# Лабораторная работа №3
# Вариант №54
# Светлаковой Ульяны 1ПМИ
(1)
g := 5
h := 6
f(g, h) := g^2*(-1)^h + h + 2
P := matrix(g, h, f)
P = [
    2, 3, 4, 5, 6, 7;
    3, 2, 5, 4, 7, 6;
    6, -1, 8, 1, 10, 3;
    11, -6, 13, -4, 15, -2;
    18, -13, 20, -11, 22, -9
]
Q(B) :=
    max ← B[1, 1]
    min ← B[1, 1]
    for k ∈ 0 .. (rows(B) - 1)
        for t ∈ 0 .. (cols(B) - 1)
            if B[k, t] < min
                min ← B[k, t]
                TMin ← t
                KMin ← k
            else if B[k, t] > max
                max ← B[k, t]
                TMax ← t
                KMax ← k
        B[KMin, TMin] ← max
        B[KMax, TMax] ← min
    B
Q(P) = [
    7, 3, 4, 5, 6, 2;
    3, 2, 5, 4, 7, 6;
    6, 10, 8, 1, -1, 3;
    11, 15, 13, -4, -6, -2;
    18, 22, 20, -11, -13, -9
]
(2)
t := 7
k := 9
h(t, k) := 3*t - k^2 + 2
A := matrix(t, k, h)
A = [
    2, 1, -2, -7, -14, -23, -34, -47, -62;
    5, 4, 1, -4, -11, -20, -31, -44, -59;
    8, 7, 4, -1, -8, -17, -28, -41, -56;
    11, 10, 7, 2, -5, -14, -25, -38, -53;
    14, 13, 10, 5, -2, -11, -22, -35, -50;
    17, 16, 13, 8, 1, -8, -19, -32, -47;
    20, 19, 16, 11, 4, -5, -16, -29, -44
]
C(B) :=
    B ← transpose(B)
    for t ∈ 0 .. (rows(B) - 1)
        sum ← 0
        for k ∈ 0 .. (cols(B) - 1)
            if B[t, k] < 0
                sum ← sum + B[t, k]
        for k ∈ 0 .. (cols(B) - 1)
            B[t, k] ← B[t, k] + sum
    transpose(B)
C(A) = [
    2, 1, -4, -19, -54, -121, -209, -313, -433;
    5, 4, -1, -16, -51, -118, -206, -310, -430;
    8, 7, 2, -13, -48, -115, -203, -307, -427;
    11, 10, 5, -10, -45, -112, -200, -304, -424;
    14, 13, 8, -7, -42, -109, -197, -301, -421;
    17, 16, 11, -4, -39, -106, -194, -298, -418;
    20, 19, 14, -1, -36, -103, -191, -295, -415
]
(3)
F(n) :=
    if n > 3
        2*F(n - 1) + F(n - 2) - F(n - 3)
    else
        1
# Пусть n = 34, тогда
n := 0 .. 6
sum(1/F(n), n) = 4.86111
