# Лабораторная работа №4
# Вариант №54
# Светлаковой Ульяны 1-ПМИ
(1)
product(1 - 1/(3*k)^2, k = 1 .. ∞) → 3*sqrt(3)/(2*π) = 0.826993
(2)
sum(e^(-3*k), k = 1 .. ∞) → 1/(e^3 - 1) = 0.0523957
(3)
limit(sin(5*x)/sin(9*x), x → 0) → 5/9
limit((2 - sqrt(x - 3))/(x^2 - 49), x → 7) → -1/56
(4)
limit(x*ln(x), x → 0+) → 0
limit(tan(x)^x, x → 0+) → 1
(5)
y(x) := 2^x*ln(x)
d^1/dx^1(y(x)) → (x*ln(2)*ln(x) + 1)*2^x/x
y(x) := cot(x)*atan(x)
d^1/dx^1(y(x)) → cot(x)/(x^2 + 1) - (atan(x)*cot(x)^2 + atan(x))
y(x) := x*sqrt(1 - x^2) + asin(x)
d^1/dx^1(y(x)) → (-(2*x^2) + 2)/sqrt(-x^2 + 1)
(6)
f(x) := cos(x)/(2 - sin(x))
x := 0
d^1/dx^1(f(x)) → 1/4
x := 1
d^2/dx^2(f(x)) → (-(2*cos(1)*sin(1)^2) + 2*cos(1)*sin(1) + (4*cos(1) - 2*cos(1)^3))/(sin(1)^3 - 6*sin(1)^2 + 12*sin(1) - 8)
x := 2
d^3/dx^3(f(x)) → (10*sin(2)^3 + (8*cos(2)^2 - 48)*sin(2)^2 + (72 - 8*cos(2)^2)*sin(2) + (6*cos(2)^4 - 16*cos(2)^2 - 32))/(sin(2)^4 - 8*sin(2)^3 + 24*sin(2)^2 - 32*sin(2) + 16) + 2
(7)
integral(ctan^3*u, u) → ctan^3*u^2/2
integral((5*u + 3)*sqrt(u^2 + 3*u + 5), u) → ((304128*u^4 + 1824768*u^3 + 4732992*u^2 + 5987520*u + 3094740)*ln(2*sqrt(u^2 + 3*u + 5) - (2*u + 3)) - (81920*u^7 + 749568*u^6 + 3382272*u^5 + 9266688*u^4 + 16547648*u^3 + 19193472*u^2 + 13523072*u + 4533933))/(49152*u^4 + 294912*u^3 + 764928*u^2 + 967680*u + 500160) + (6442040*u^2 + 10629366*u + 19165069)/(48*(256*u^4 + 1536*u^3 + 3984*u^2 + 5040*u + 2605)*((512*u^4 + 3072*u^3 + 7968*u^2 + 10080*u + 5210)*sqrt(u^2 + 3*u + 5) - (512*u^5 + 3840*u^4 + 13280*u^3 + 25200*u^2 + 26050*u + 11643)))
(8)
integral(sin(3*u), u = 0 .. 2*π) → 0
integral(e^(-u)*cos(5*u), u = 0 .. ∞) → 1/26
integral(ln(u)^5, u = 0 .. 1) → -120
(9)
tan(t) series, 10 → t + 1/3*t^3 + 2/15*t^5 + 17/315*t^7 + 62/2835*t^9
acos(t) series, 10 → π/2 - t - 1/6*t^3 - 3/40*t^5 - 5/112*t^7 - 35/1152*t^9
(10)
g(q, b) := (1 - b)/sqrt(b)*q^2 - 2*q + sqrt(b)
q(b) := sqrt(b)/(1 - sqrt(b))
g(q, b) simplify → sqrt(b)*(b - 1)/(2*b*sqrt((-b + 1)/sqrt(b)) + (b^(3/2) - (sqrt(b) + b))) + ((sqrt(2) - 1)*sqrt(b) + sqrt(2))/(sqrt(2) - 1)
# (11) | (a)
n^5 - 3*n^4 + (a - b^3)*n^3 + 3*(b^3 - a)*n^2 - ab^3*n + 3*ab^3 solve, n → [
    3;
    sqrt(2*sqrt(b^6 - 2*a*b^3 + 4*ab^3 + a^2) + (2*b^3 - 2*a))/2;
    -sqrt(2*sqrt(b^6 - 2*a*b^3 + 4*ab^3 + a^2) + (2*b^3 - 2*a))/2;
    sqrt(-(2*sqrt(b^6 - 2*a*b^3 + 4*ab^3 + a^2)) + (2*b^3 - 2*a))/2;
    -sqrt(-(2*sqrt(b^6 - 2*a*b^3 + 4*ab^3 + a^2)) + (2*b^3 - 2*a))/2
]
(b)
n^10 - 1 solve → [
    e^(4*π*1i/5);
    e^(3*π*1i/5);
    e^(2*π*1i/5);
    e^(π*1i/5);
    1;
    1/e^(π*1i/5);
    1/e^(2*π*1i/5);
    1/e^(3*π*1i/5);
    1/e^(4*π*1i/5);
    -1
]
(12)
A(a, b, n) :=
    for i ∈ 0 .. (n - 1)
        A[i, i] ← -a
        if i < n - 1
            A[i, i + 1] ← 1
        if i > 0
            A[i, i - 1] ← b
    A
C(n) :=
    for i ∈ 0 .. n - 1
        if (mod(i, 2) > 0)
            C[i] ← 2
        else
            C[i] ← 1
    C
A(a, b, 2) → [-a, 1; b, -a]
C(2) → [1; 2]
det(A(a, b, 2)) → -b + a^2
A(a, b, 2)^-1*C(2) → [a/(b - a^2) + 2/(b - a^2); b/(b - a^2) + 2*a/(b - a^2)]
A(a, b, 4) → [-a, 1, 0, 0; b, -a, 1, 0; 0, b, -a, 1; 0, 0, b, -a]
C(4) → [1; 2; 1; 2]
det(A(a, b, 4)) → b^2 - 3*a^2*b + a^4
A(a, b, 4)^-1*C(4) → [
    (2*a*b - a^3)/(b^2 - 3*a^2*b + a^4) + ((2*b - 2*a^2)/(b^2 - 3*a^2*b + a^4) - (a/(b^2 - 3*a^2*b + a^4) + 2/(b^2 - 3*a^2*b + a^4)));
    (b^2 - a^2*b)/(b^2 - 3*a^2*b + a^4) + ((2*a*b - 2*a^3)/(b^2 - 3*a^2*b + a^4) - (a^2/(b^2 - 3*a^2*b + a^4) + 2*a/(b^2 - 3*a^2*b + a^4)));
    -a*b^2/(b^2 - 3*a^2*b + a^4) + ((a*b - a^3)/(b^2 - 3*a^2*b + a^4) + (2*b - 2*a^2)/(b^2 - 3*a^2*b + a^4) - 2*a^2*b/(b^2 - 3*a^2*b + a^4));
    -b^3/(b^2 - 3*a^2*b + a^4) + ((b^2 - a^2*b)/(b^2 - 3*a^2*b + a^4) + (4*a*b - 2*a^3)/(b^2 - 3*a^2*b + a^4) - 2*a*b^2/(b^2 - 3*a^2*b + a^4))
]
A(a, b, 8) → [
    -a, 1, 0, 0, 0, 0, 0, 0;
    b, -a, 1, 0, 0, 0, 0, 0;
    0, b, -a, 1, 0, 0, 0, 0;
    0, 0, b, -a, 1, 0, 0, 0;
    0, 0, 0, b, -a, 1, 0, 0;
    0, 0, 0, 0, b, -a, 1, 0;
    0, 0, 0, 0, 0, b, -a, 1;
    0, 0, 0, 0, 0, 0, b, -a
]
C(8) → [1; 2; 1; 2; 1; 2; 1; 2]
det(A(a, b, 8)) → b^4 - 10*a^2*b^3 + 15*a^4*b^2 - 7*a^6*b + a^8
A(a, b, 8)^1*C(8) → [
    -a + 2;
    b + (1 - 2*a);
    2*b + (2 - a);
    b + (1 - 2*a);
    2*b + (2 - a);
    b + (1 - 2*a);
    2*b + (2 - a);
    b - 2*a
]
A(a, b, 16) → [
    -a, 1, 0, 0, 0, 0, 0, 0, 0, 0, 0, 0, 0, 0, 0, 0;
    b, -a, 1, 0, 0, 0, 0, 0, 0, 0, 0, 0, 0, 0, 0, 0;
    0, b, -a, 1, 0, 0, 0, 0, 0, 0, 0, 0, 0, 0, 0, 0;
    0, 0, b, -a, 1, 0, 0, 0, 0, 0, 0, 0, 0, 0, 0, 0;
    0, 0, 0, b, -a, 1, 0, 0, 0, 0, 0, 0, 0, 0, 0, 0;
    0, 0, 0, 0, b, -a, 1, 0, 0, 0, 0, 0, 0, 0, 0, 0;
    0, 0, 0, 0, 0, b, -a, 1, 0, 0, 0, 0, 0, 0, 0, 0;
    0, 0, 0, 0, 0, 0, b, -a, 1, 0, 0, 0, 0, 0, 0, 0;
    0, 0, 0, 0, 0, 0, 0, b, -a, 1, 0, 0, 0, 0, 0, 0;
    0, 0, 0, 0, 0, 0, 0, 0, b, -a, 1, 0, 0, 0, 0, 0;
    0, 0, 0, 0, 0, 0, 0, 0, 0, b, -a, 1, 0, 0, 0, 0;
    0, 0, 0, 0, 0, 0, 0, 0, 0, 0, b, -a, 1, 0, 0, 0;
    0, 0, 0, 0, 0, 0, 0, 0, 0, 0, 0, b, -a, 1, 0, 0;
    0, 0, 0, 0, 0, 0, 0, 0, 0, 0, 0, 0, b, -a, 1, 0;
    0, 0, 0, 0, 0, 0, 0, 0, 0, 0, 0, 0, 0, b, -a, 1;
    0, 0, 0, 0, 0, 0, 0, 0, 0, 0, 0, 0, 0, 0, b, -a
]
C(16) → [1; 2; 1; 2; 1; 2; 1; 2; 1; 2; 1; 2; 1; 2; 1; 2]
det(A(a, b, 16)) → b^8 - 36*a^2*b^7 + 210*a^4*b^6 - 462*a^6*b^5 + 495*a^8*b^4 - 286*a^10*b^3 + 91*a^12*b^2 - 15*a^14*b + a^16
# и так далее ...
