# Лабораторная работа №5 | Светлаковой Ульяны 1-ПМИ
(1)
x[0] := 9^3
x[1] := 87 + 3*34
x[2] := 6^2 + 4
x[0] = 729
x[1] = 189
x[2] = 40
f[1] := WRITETEXT("output_1.txt", x)
(2)
n := 0 .. 4
m := 0 .. 7
M[n, m] := 4*n + 3*m
M[n, n] := 2*n + 8
M = [
    8, 3, 6, 9, 12, 15, 18, 21;
    4, 10, 10, 13, 16, 19, 22, 25;
    8, 11, 12, 17, 20, 23, 26, 29;
    12, 15, 18, 14, 24, 27, 30, 33;
    16, 19, 22, 25, 16, 31, 34, 37
]
f[2] := WRITETEXT("output_2.txt", M)
(3)
READTEXT("input.txt") = ["HELLO", "WORLD", "!"; 1, 2, 3; 4, 4, 7]
(4)
x := READEXCEL("table.xlsx", "Лист1!A2:A21")
y := READEXCEL("table.xlsx", "Лист1!B2:B21")
# [plot: y vs x]
x = [1; 2; 3; 4; 5; 6; 7; 8; 9; 10; 11; 12; 13; 14; 15; 16; 17; 18; 19; 20]
y = [4; 14; 30; 52; 80; 114; 154; 200; 252; 310; 374; 444; 520; 602; 690; 784; 884; 990; 1102; 1220]
(5)
m := WRITEEXCEL(M, "matrix.xlsx", "A1")  # используем матрицу М из пункта (2)
